// SBML level 2 version 4

model modular_circuit_simplified()

  // Compartments:
  compartment default = 1 volume;

  // Species:
  species ethylene in default = 0;
  species gene_VP16 in default = 0;
  species mRNA_VP16 in default = 0;
  species VP16 in default = 0;
  species Nucleotides in default = 0;
  species Amino_Acids in default = 0;
  species deg_mRNA_VP16 in default = 0;
  species deg_VP16 in default = 0;
  species deg_mRNA_TetR in default = 0;
  species mRNA_TetR in default = 0;
  species gene_GAL4 in default = 0;
  species TetR_SRDx_Ub in default = 0;
  species deg_tetr in default = 0;
  substanceOnly species Giberellin in default = 0;
  species gene_TetR in default = 0;
  species mRNA_GAL4 in default = 0;
  species deg_mRNA_GAL4 in default = 0;
  species Gal4 in default = 0;
  species deg_Gal4 in default = 0;
  species VP16_Gal4_Dimer in default = 0;
  species mRNA_vp16_gal4_fused in default = 0;
  species gene_vp16_gal4_fused in default = 0;
  species gene_lexA_SRDX in default = 0;
  species mRNA_lexA_SRDX in default = 0;
  species lexA_SRDX in default = 0;
  species mRNA_adh1_pdc in default = 0;
  species gene_adh1_pdc in default = 0;
  species ADH1 in default = 0;
  species PDC in default = 0;
  species deg_mRNA_vp16_gal4_fused in default = 0;
  species deg_mRNA_lexA_SRDX in default = 0;
  species deg_mRNA_adh1_pdc in default = 0;
  species deg_adh1 in default = 0;
  species deg_pdc in default = 0;
  species deg_vp16_gal4_dimer in default = 0;
  species pyruvate in default = 1390000;
  species Acetaldehyde in default = 0;
  species Ethanol in default = 0;
  species deg_lexA_SRDX in default = 0;
  species evaporated_ethanol in default = 0;
  substanceOnly species ethylene_precursor in default = 1e-6;
  species s50 in default = 0; s50 is "deg ethylene";

  // Parameters:
  k_trans_global = 0.001 substance; k_trans_global is "Global Transcription Rate";
  d_mrna_global = 0.0058 substance; d_mrna_global is "Global mRNA Degradation Rate";
  k_tl_global = 3 substance; k_tl_global is "Global Protein Translation Rate";
  d_prot_global = 0 substance; d_prot_global is "Global Protein Degradation Rate";
  km_eth = 1.783e-5 substance; km_eth is "KM of ethylene (activation)";
  km_ga = 1.783e-5 substance; km_ga is "km of gibberellin (activator)";
  d_pest = 0.001 substance; d_pest is "deg for pest sequence";
  rate_ethylene = 0.001 substance; rate_ethylene is "rate of ethylene production";
  deg_ethylene = 0.001 substance; deg_ethylene is "rate of ethylene degradation";
  k_evaporation = 0.000115 substance; k_evaporation is "evaporation of ethanol";

  // Reactions:
  re1: Nucleotides => mRNA_VP16; k_trans_global*ethylene/(km_eth + ethylene);  // modifiers: gene_VP16, ethylene
  re2: mRNA_VP16 => deg_mRNA_VP16; d_mrna_global*mRNA_VP16;
  re3: Amino_Acids => VP16; k_tl_global*mRNA_VP16;  // modifiers: mRNA_VP16
  re4: VP16 => deg_VP16; d_prot_global*VP16;
  re17: Nucleotides => mRNA_GAL4; k_trans_global*k_m_gal4^n_gal4/(k_m_gal4^n_gal4 + TetR_SRDx_Ub^n_gal4);  // modifiers: gene_GAL4, TetR_SRDx_Ub
    k_m_gal4 = 0.001 substance; n_gal4 = 1 substance;
  re18: Amino_Acids => Gal4; k_tl_global*mRNA_GAL4;  // modifiers: mRNA_GAL4
  re19: Gal4 => deg_Gal4; d_prot_global*Gal4;
  re20: gene_TetR => mRNA_TetR; k_trans_global*Giberellin/(km_ga + Giberellin);  // modifiers: Nucleotides, Giberellin
  re21: Amino_Acids => TetR_SRDx_Ub; k_tl_global*mRNA_TetR;  // modifiers: mRNA_TetR
  re22: TetR_SRDx_Ub => deg_tetr; d_pest*TetR_SRDx_Ub;
  re23: mRNA_TetR => deg_mRNA_TetR; d_mrna_global*mRNA_TetR;
  re24: mRNA_GAL4 => deg_mRNA_GAL4; d_mrna_global*mRNA_GAL4;
  re26: Nucleotides => mRNA_vp16_gal4_fused; k_trans_global*VP16_Gal4_Dimer^re26_n_vp16_gal4_dimer/(re26_k_m_vp16_gal4_dimer^re26_n_vp16_gal4_dimer + VP16_Gal4_Dimer^re26_n_vp16_gal4_dimer);  // modifiers: VP16_Gal4_Dimer, gene_vp16_gal4_fused
    re26_k_m_vp16_gal4_dimer = 0.018 substance; re26_n_vp16_gal4_dimer = 1 substance;
  re27: Amino_Acids => VP16_Gal4_Dimer; k_tl_global*mRNA_vp16_gal4_fused;  // modifiers: mRNA_vp16_gal4_fused
  re28: Nucleotides => mRNA_lexA_SRDX; k_trans_global*VP16_Gal4_Dimer^re28_n_vp16_gal4_dimer/(re28_k_m_vp16_gal4_dimer^re28_n_vp16_gal4_dimer + VP16_Gal4_Dimer^re28_n_vp16_gal4_dimer);  // modifiers: gene_lexA_SRDX, VP16_Gal4_Dimer
    re28_k_m_vp16_gal4_dimer = 0.084 substance; re28_n_vp16_gal4_dimer = 1 substance;
  re30: Nucleotides => mRNA_adh1_pdc; k_trans_global*k_m_repr^n_repr/(k_m_repr^n_repr + lexA_SRDX^n_repr)*(k_trans_global*VP16_Gal4_Dimer^n_act/(k_m_act^n_act + VP16_Gal4_Dimer^n_act));  // modifiers: gene_adh1_pdc, VP16_Gal4_Dimer, lexA_SRDX
    k_m_act = 0.018 substance; k_m_repr = 10 substance; n_act = 1 substance; n_repr = 1 substance;
  re31: Amino_Acids => ADH1; k_tl_global*mRNA_adh1_pdc;  // modifiers: mRNA_adh1_pdc
  re32: Amino_Acids => PDC; k_tl_global*mRNA_adh1_pdc;  // modifiers: mRNA_adh1_pdc
  re33: mRNA_vp16_gal4_fused => deg_mRNA_vp16_gal4_fused; d_mrna_global*mRNA_vp16_gal4_fused;
  re34: mRNA_lexA_SRDX => deg_mRNA_lexA_SRDX; d_mrna_global*mRNA_lexA_SRDX;
  re35: mRNA_adh1_pdc => deg_mRNA_adh1_pdc; d_mrna_global*mRNA_adh1_pdc;
  re36: ADH1 => deg_adh1; d_prot_global*ADH1;
  re37: PDC => deg_pdc; d_pest*PDC;
  re40: VP16_Gal4_Dimer => deg_vp16_gal4_dimer; d_prot_global*VP16_Gal4_Dimer;
  re43: VP16 + Gal4 => VP16_Gal4_Dimer; k_on_dimer*VP16*Gal4;
    k_on_dimer = 60 substance;
  re44: pyruvate => Acetaldehyde; k_cat_pdc*PDC*pyruvate/(k_m_pdc + pyruvate);  // modifiers: PDC
    k_cat_pdc = 3000 substance; k_m_pdc = 500 substance;
  re45: Acetaldehyde => Ethanol; k_cat_adh1*ADH1*Acetaldehyde/(k_m_adh1 + Acetaldehyde);  // modifiers: ADH1
    k_cat_adh1 = 3000 substance; k_m_adh1 = 16000 substance;
  re46: Amino_Acids => lexA_SRDX; k_tl_global*mRNA_lexA_SRDX;  // modifiers: mRNA_lexA_SRDX
  re47: lexA_SRDX => deg_lexA_SRDX; d_pest*lexA_SRDX;
  re51: Ethanol => evaporated_ethanol; k_evaporation*Ethanol;
  re52: ethylene_precursor => ethylene; rate_ethylene*ethylene_precursor;
  re53: ethylene => s50; deg_ethylene*ethylene;

  // Unit definitions:
  unit substance = mole;
  unit volume = litre;
  unit area = metre^2;
  unit length = metre;
  unit time = second;
end
