// SBML level 2 version 4

model modular_circuit_simplified()

  // Compartments:
  compartment default = 1 volume;

  // Species:
  species gene_VP16 in default = 0;
  species mRNA_VP16 in default = 0;
  species VP16 in default = 0;
  species Nucleotides in default = 0;
  species Amino_Acids in default = 0;
  species deg_mRNA_VP16 in default = 0;
  species deg_VP16 in default = 0;
  species deg_mRNA_TetR in default = 0;
  species mRNA_TetR in default = 0;
  species gene_GAL4 in default = 0;
  species TetR_SRDx_Ub in default = 0;
  species deg_tetr in default = 0;
  substanceOnly species Giberellin in default = 0;
  species gene_TetR in default = 0;
  species mRNA_GAL4 in default = 0;
  species deg_mRNA_GAL4 in default = 0;
  species Gal4 in default = 0;
  species deg_Gal4 in default = 0;
  species eth_precursor in default = 0;
  species ethylene in default = 0;
  species deg_eth in default = 0;

  // Parameters:
  k_trans_global = 9.96e-6 substance; k_trans_global is "Global Transcription Rate";
  d_mrna_global = 0.0058 substance; d_mrna_global is "Global mRNA Degradation Rate";
  k_tl_global = 3 substance; k_tl_global is "Global Protein Translation Rate";
  d_prot_global = 0 substance; d_prot_global is "Global Protein Degradation Rate";
  km_eth = 1.783e-5 substance; km_eth is "KM of ethylene (activation)";
  km_ga = 1.783e-5 substance; km_ga is "km of gibberellin (activator)";
  rate_ethylene = 0.01 substance;

  // Reactions:
  re1: Nucleotides => mRNA_VP16; k_trans_global*ethylene/(km_eth + ethylene);  // modifiers: gene_VP16, ethylene
  re2: mRNA_VP16 => deg_mRNA_VP16; d_mrna_global*mRNA_VP16;
  re3: Amino_Acids => VP16; k_tl_global*mRNA_VP16;  // modifiers: mRNA_VP16
  re4: VP16 => deg_VP16; 0*VP16;
  re17: Nucleotides => mRNA_GAL4; k_trans_global*k_m_gal4^n_gal4/(k_m_gal4^n_gal4 + TetR_SRDx_Ub^n_gal4);  // modifiers: gene_GAL4, TetR_SRDx_Ub
    k_m_gal4 = 0.001 substance; n_gal4 = 1 substance;
  re18: Amino_Acids => Gal4; k_tl_global*mRNA_GAL4;  // modifiers: mRNA_GAL4
  re19: Gal4 => deg_Gal4; d_prot_global*Gal4;
  re20: gene_TetR => mRNA_TetR; k_trans_global*Giberellin/(km_ga + Giberellin);  // modifiers: Nucleotides, Giberellin
  re21: Amino_Acids => TetR_SRDx_Ub; k_tl_global*mRNA_TetR;  // modifiers: mRNA_TetR
  re22: TetR_SRDx_Ub => deg_tetr; d_tetr*TetR_SRDx_Ub;
    d_tetr = 0.001 substance;
  re23: mRNA_TetR => deg_mRNA_TetR; d_mrna_global*mRNA_TetR;
  re24: mRNA_GAL4 => deg_mRNA_GAL4; d_mrna_global*mRNA_GAL4;
  re25: eth_precursor => ethylene; rate_ethylene*eth_precursor;
  re26: ethylene => deg_eth; deg_ethylene*ethylene;
    deg_ethylene = 0.01 substance;

  // Unit definitions:
  unit substance = mole;
  unit volume = litre;
  unit area = metre^2;
  unit length = metre;
  unit time = second;
end
