// SBML level 2 version 4

model ethanol_pathway()

  // Compartments:
  compartment default = 1 volume;

  // Species:
  substanceOnly species pyruvate in default = 0.5;
  species Acetaldehyde in default = 0;
  species Ethanol in default = 0;
  species PDC in default = 0.01/default;
  substanceOnly species ADH in default = 0.02;

  // Reactions:
  re1: pyruvate => Acetaldehyde; k_cat_pdc*PDC*pyruvate/(k_m_pdc + pyruvate);  // modifiers: PDC
    k_m_pdc = 1 substance; k_cat_pdc = 50 substance;
  re3: Acetaldehyde => Ethanol; k_cat_adh*ADH*Acetaldehyde/(k_m_adh + Acetaldehyde);  // modifiers: ADH
    k_m_adh = 21.5 substance; k_cat_adh = 172 substance;

  // Unit definitions:
  unit substance = mole;
  unit volume = litre;
  unit area = metre^2;
  unit length = metre;
  unit time = second;
end
